AddBusMarker Bus=744810 code=15 color=Red size=4
New monitor.PMONITOR220486 element=transformer.TRF_220486A terminal=1 mode=1 ppolar=no

AddBusMarker Bus=746760 code=15 color=Red size=4
New monitor.PMONITOR214494 element=transformer.TRF_214494A terminal=1 mode=1 ppolar=no

AddBusMarker Bus=746760 code=15 color=Red size=4
New monitor.PMONITOR214494 element=transformer.TRF_214494A terminal=1 mode=1 ppolar=no
