clear
Redirect "CircuitoMT_2022124950_IJAU11_--MBS-1--T--.dss"
Redirect "CodCondutor_2022124950_IJAU11_--MBS-1--T--.dss"
Redirect "TransformadorMTMTMTBT_2022124950_IJAU11_--MBS-1--T--.dss"
Redirect "SegmentosMT_2022124950_IJAU11_--MBS-1--T--.dss"
Redirect "ChavesMT_2022124950_IJAU11_--MBS-1--T--.dss"
Redirect "SegmentosBT_2022124950_IJAU11_--MBS-1--T--.dss"
Redirect "RamaisBT_2022124950_IJAU11_--MBS-1--T--.dss"
Redirect "Medidores_2022124950_IJAU11_--MBS-1--T--.dss"
Redirect "CurvaCarga_2022124950_IJAU11_--MBS-1--T--.dss"
Redirect "CargasBT_DU01_2022124950_IJAU11_--MBS-1--T--.dss"
Redirect "CargasMT_DU01_2022124950_IJAU11_--MBS-1--T--.dss"

!Redirect "BRR_AREARURAL.dss"

New monitor.TOTALvoltage element=line.SMT_1128316 terminal=1 mode=0
New monitor.TOTALpower element=line.SMT_1128316 terminal=1 mode=1 ppolar=no

New "LoadShape.PVIrrad_diaria" npts=24 interval=1
~ mult = [0 0 0 0 0 0 0.1 0.2 0.3 0.5 0.8 0.9 1.0 1.0 0.99 0.9 0.7 0.4 0.1 0 0 0 0 0]
New XYCurve.MyPvsT npts=4  xarray=[0  25  75  100]  yarray=[1.2 1.0 0.8  0.6]
New XYCurve.MyEff npts=4  xarray=[0.1  0.2  0.4  1.0]  yarray=[0.86  0.9  0.93  0.97]
New Tshape.MyTemp npts=24 interval=1
~ temp=[25, 25, 25, 25, 25, 25, 25, 25, 35, 40, 45, 50, 60, 60, 55, 40, 35, 30, 25, 25, 25, 25, 25, 25]

Set mode = daily
Set Voltagebases = [0.22 0.24 13.8]
Calc Voltagebases
Set tolerance = 0.0001
Set maxcontroliter = 10
!Set algorithm = newton
!Solve mode = direct
Solve

!Plot monitor object=TOTALvoltage channels=(1 3 5) bases=[7967 7967 7967]
!Plot monitor object=TOTALpower channels=(1 3 5)


buscoords buscoords.csv
